<?xml version="1.0"?>

<!-- Copyright (c) 2026 Josh Davidson (Octal450) -->

<turbine_engine name="JT8D-217A">

	<milthrust>20000</milthrust>
	<tsfc>0.697</tsfc>
	<bleed>0</bleed> <!-- Set by pneumatic system -->
	<ignitionn1>7.3</ignitionn1>
	<ignitionn2>24.4</ignitionn2>
	<n1spinup>0.27</n1spinup>
	<n2spinup>0.904</n2spinup>
	<n1spindown>9.5</n1spindown>
	<n2spindown>9.5</n2spindown>
	<n1startrate>1.286</n1startrate>
	<n2startrate>2.129</n2startrate>
	<idlen1>25.3</idlen1>
	<idlen2>54.2</idlen2>
	<maxn1>101.6</maxn1>
	<maxn2>102.5</maxn2>
	<augmented>0</augmented>
	<injected>0</injected>

	<function name="N1SpoolUp">
		<table>
			<independentVar lookup="row">propulsion/engine[0]/n1</independentVar>
			<independentVar lookup="column">/systems/acconfig/autoconfig-running</independentVar>
			<tableData> <!-- Bottlenecked by slow fuel control valve + uneven -->
				    0    1
				28  4.2  50
				46  9.3  50
			</tableData>
		</table>
	</function>

	<function name="N1SpoolDown">
		<table>
			<independentVar lookup="row">propulsion/engine[0]/n1</independentVar>
			<independentVar lookup="column">/systems/acconfig/autoconfig-running</independentVar>
			<tableData> <!-- Bottlenecked by slow fuel control valve + uneven -->
				    0    1
				28  3.5  50
				46  8.4  50
			</tableData>
		</table>
	</function>

	<function name="N2SpoolUp"> <!-- N1 to N2 factor 0.63302752293578 -->
		<table>
			<independentVar lookup="row">propulsion/engine[0]/n1</independentVar>
			<independentVar lookup="column">/systems/acconfig/autoconfig-running</independentVar>
			<tableData> <!-- Bottlenecked by slow fuel control valve + uneven -->
				    0    1
				28  2.7  31
				46  5.9  31
			</tableData>
		</table>
	</function>

	<function name="N2SpoolDown"> <!-- N1 to N2 factor 0.63302752293578 -->
		<table>
			<independentVar lookup="row">propulsion/engine[0]/n1</independentVar>
			<independentVar lookup="column">/systems/acconfig/autoconfig-running</independentVar>
			<tableData> <!-- Bottlenecked by slow fuel control valve + uneven -->
				    0    1
				28  2.2  31
				46  5.3  31
			</tableData>
		</table>
	</function>

	<function name="IdleThrust">
		<table>
			<independentVar lookup="row">velocities/mach</independentVar>
			<independentVar lookup="column">atmosphere/density-altitude</independentVar>
			<tableData>
				    -10000   0       10000   20000   30000   45000   52000
				0.0  0.0398  0.0474  0.0544  0.0594  0.0654  0.0694  0.0000
				0.2  0.0223  0.0311  0.0375  0.0464  0.0557  0.0603  0.0000
				0.4  0.0000  0.0104  0.0177  0.0312  0.0434  0.0507  0.0000
				0.5  0.0000  0.0000  0.0087  0.0226  0.0358  0.0452  0.0000
				0.6  0.0000  0.0000  0.0000  0.0144  0.0282  0.0394  0.0000
				0.8  0.0000  0.0000  0.0000  0.0000  0.0138  0.0244  0.0000
				1.0  0.0000  0.0000  0.0000  0.0000  0.0000  0.0113  0.0000
				1.2  0.0000  0.0000  0.0000  0.0000  0.0000  0.0000  0.0000
			</tableData>
		</table>
	</function>

	<function name="MilThrust"> <!-- If you change this, make sure you update the table in the engine system file -->
		<product>
			<table>
				<independentVar lookup="row">velocities/mach</independentVar>
				<independentVar lookup="column">atmosphere/density-altitude</independentVar>
				<tableData>
					    -10000   0       10000   20000   30000   45000   52000
					0.0  1.2100  1.0000  0.7400  0.5320  0.3340  0.2210  0.0000
					0.2  1.1710  0.9740  0.7090  0.5040  0.3090  0.2040  0.0000
					0.4  1.1500  0.9570  0.6920  0.4940  0.3110  0.2090  0.0000
					0.6  1.1640  0.9410  0.7140  0.4940  0.3090  0.2080  0.0000
					0.8  1.1890  0.9710  0.7350  0.5070  0.3060  0.2070  0.0000
					0.9  1.1920  0.9760  0.7320  0.5010  0.2930  0.1940  0.0000
					1.0  1.1810  0.9510  0.7020  0.4590  0.2430  0.1560  0.0000
					1.2  0.0000  0.0000  0.0000  0.0000  0.0000  0.0000  0.0000
				</tableData>
			</table>
			<property>/systems/engines/limit/rated-thrust-factor</property>
			<table> <!-- Thrust loss due to reverser angle -->
				<independentVar lookup="row">/engines/engine[0]/reverser-pos-norm</independentVar>
				<tableData>
					0.01  1.00
					1.00  0.65
				</tableData>
			</table>
		</product>
	</function>

</turbine_engine>
