<?xml version="1.0"?>

<!-- McDonnell Douglas MD-80 Aerodynamics -->
<!-- Copyright (c) 2025 Josh Davidson (Octal450) -->

<aerodynamics>

	<function name="aero/function/kCLge">
		<description>Lift factor due to ground effect</description>
		<table>
			<independentVar lookup="row">aero/h_b-mac-ft</independentVar>
			<tableData>
				0.00  1.203
				0.10  1.127
				0.15  1.090
				0.20  1.073
				0.30  1.046
				0.40  1.055
				0.50  1.019
				0.60  1.013
				0.70  1.008
				0.80  1.006
				0.90  1.003
				1.00  1.002
				1.10  1.000
			</tableData>
		</table>
	</function>

	<function name="aero/function/kCDge">
		<description>Drag factor due to ground effect</description>
		<table>
			<independentVar lookup="row">aero/h_b-mac-ft</independentVar>
			<tableData>
				0.00  0.480
				0.10  0.515
				0.15  0.629
				0.20  0.709
				0.30  0.815
				0.40  0.882
				0.50  0.928
				0.60  0.962
				0.70  0.988
				0.80  1.000
			</tableData>
		</table>
	</function>

	<function name="aero/function/kCmalpha"> <!-- Deep Stall -->
		<description>Alpha pitch factor due to wing shadow</description>
		<table>
			<independentVar lookup="row">aero/alpha-deg</independentVar>
			<tableData>
				16.2412  1.0
				20.1657  0.2
				31.2478  0.4
			</tableData>
		</table>
	</function>

	<function name="aero/function/kCmde"> <!-- Deep Stall -->
		<description>Elevator pitch factor due to wing shadow</description>
		<table>
			<independentVar lookup="row">aero/alpha-deg</independentVar>
			<tableData>
				16.2412  1.0
				20.1657  0.2
				31.2478  0.4
			</tableData>
		</table>
	</function>

	<function name="aero/function/kCmdstab"> <!-- Deep Stall -->
		<description>Stabilizer pitch factor due to wing shadow</description>
		<table>
			<independentVar lookup="row">aero/alpha-deg</independentVar>
			<tableData>
				16.2412  1.0
				20.1657  0.4
				31.2478  0.6
			</tableData>
		</table>
	</function>

	<function name="aero/function/kCndr"> <!-- Airflow Compensated Rudder Deflection -->
		<description>NTSB AAR81-16: Authority loss due to reverser airflow, using generic value of 30 deg max in the table for flexibility</description>
		<sum>
			<table> <!-- Left deflection -->
				<independentVar lookup="row">/engines/engine[0]/epr-actual</independentVar>
				<independentVar lookup="column">/systems/fcs/rudder/final-deg</independentVar>
				<independentVar lookup="table">/engines/engine[0]/reverser-pos-norm</independentVar>
				<tableData breakPoint="0.01"> <!-- 100% -->
					    -30    0
					1.0 -30.0  0.0
					1.9 -30.0  0.0
				</tableData>
				<tableData breakPoint="1"> <!-- 65%, 25%, 10%, 5% -->
					    -30    0
					1.0 -19.5  0.0
					1.3  -7.5  0.0
					1.6  -3.0  0.0
					1.9  -1.5  0.0
				</tableData>
			</table>
			<table> <!-- Right deflection -->
				<independentVar lookup="row">/engines/engine[1]/epr-actual</independentVar>
				<independentVar lookup="column">/systems/fcs/rudder/final-deg</independentVar>
				<independentVar lookup="table">/engines/engine[1]/reverser-pos-norm</independentVar>
				<tableData breakPoint="0.01"> <!-- 100% -->
					     0    30
					1.0  0.0  30.0
					1.9  0.0  30.0
				</tableData>
				<tableData breakPoint="1"> <!-- 65%, 25%, 10%, 5% -->
					     0    30
					1.0  0.0  19.5
					1.3  0.0   7.5
					1.6  0.0   3.0
					1.9  0.0   1.5
				</tableData>
			</table>
		</sum>
	</function>

	<axis name="LIFT">

		<function name="aero/coefficient/CLalpha">
			<description>Lift due to alpha</description>
			<product>
				<property>aero/qbar-psf</property>
				<property>metrics/Sw-sqft</property>
				<property>aero/function/kCLge</property>
				<table>
					<independentVar lookup="row">aero/alpha-deg</independentVar>
					<independentVar lookup="column">velocities/mach</independentVar>
					<independentVar lookup="table">fcs/slat-pos-norm</independentVar>
					<tableData breakPoint="0">
						         0.2     0.9
						-9.8475 -0.5652 -0.5935
						-2.0912  0.0625  0.0656
						-0.0098  0.2386  0.2505
						 2.2280  0.4260  0.4473
						 4.2779  0.5779  0.6068
						 6.4218  0.7540  0.7917
						 8.4561  0.9163  0.9621
						 9.2699  0.9842  0.8076
						10.7094  1.0843  0.6617
						11.6170  1.1538  0.5827
						12.6496  1.2184  0.5949
						13.7292  1.0622  0.6074
						14.7930  0.9804  0.5648
						15.6981  0.9051  0.5285
						16.6352  0.9187  0.4910
						17.5725  0.9219  0.4535
						18.6045  0.8842  0.4121
						19.6052  0.8459  0.3720
						30.1264  0.4196 -0.0494
					</tableData>
					<tableData breakPoint="1">
						         0.2     0.9
						-9.8475 -0.5652 -0.5935
						-2.0912  0.0625  0.0656
						-0.0098  0.2386  0.2505
						 2.2280  0.4260  0.4473
						 4.2779  0.5779  0.6068
						 6.4218  0.7540  0.7917
						 8.4561  0.9163  0.9621
						 9.2699  0.9842  1.0303
						10.7094  1.0843  1.1507
						11.6170  1.1538  0.9945
						12.6496  1.2184  0.9127
						13.7292  1.2911  0.8374
						14.7930  1.3444  0.8510
						15.6981  1.1882  0.8542
						16.6352  1.1064  0.8180
						17.5725  1.0311  0.7818
						18.6045  1.0447  0.7441
						19.6052  1.0479  0.7058
						30.1264  0.6376  0.2795
					</tableData>
				</table>
			</product>
		</function>

		<function name="aero/coefficient/CLq">
			<description>Lift due to pitch rate</description>
			<product>
				<property>aero/qbar-psf</property>
				<property>metrics/Sw-sqft</property>
				<property>velocities/q-aero-rad_sec</property>
				<property>aero/ci2vel</property>
				<value>1.36</value>
			</product>
		</function>

		<function name="aero/coefficient/CLadot">
			<description>Lift due to alpha rate</description>
			<product>
				<property>aero/qbar-psf</property>
				<property>metrics/Sw-sqft</property>
				<property>aero/alphadot-rad_sec</property>
				<property>aero/ci2vel</property>
				<value>0.6384</value>
			</product>
		</function>

		<function name="aero/coefficient/CLflap">
			<description>Lift due to flaps</description>
			<product>
				<property>aero/qbar-psf</property>
				<property>metrics/Sw-sqft</property>
				<property>aero/function/kCLge</property>
				<table>
					<independentVar lookup="row">fcs/flap-pos-deg</independentVar>
					<tableData>
						 0  0.0000
						11  0.1706
						15  0.2276
						28  0.4951
						40  0.6701
					</tableData>
				</table>
			</product>
		</function>

		<function name="aero/coefficient/CLslat">
			<description>Lift due to slats</description>
			<product>
				<property>aero/qbar-psf</property>
				<property>metrics/Sw-sqft</property>
				<property>aero/function/kCLge</property>
				<table>
					<independentVar lookup="row">fcs/slat-pos-deg</independentVar>
					<tableData>
						 0  0.0000
						10  0.1394
						20  0.2612
					</tableData>
				</table>
			</product>
		</function>

		<function name="aero/coefficient/CLde_l">
			<description>Lift due to left elevator</description>
			<product>
				<property>aero/qbar-psf</property>
				<property>metrics/Sw-sqft</property>
				<toradians><property>/systems/fcs/elevator-l/final-deg</property></toradians>
				<value>0.0116548</value>
			</product>
		</function>

		<function name="aero/coefficient/CLde_r">
			<description>Lift due to right elevator</description>
			<product>
				<property>aero/qbar-psf</property>
				<property>metrics/Sw-sqft</property>
				<toradians><property>/systems/fcs/elevator-r/final-deg</property></toradians>
				<value>0.0116548</value>
			</product>
		</function>

		<function name="aero/coefficient/CLdstab">
			<description>Lift due to stabilizer</description>
			<product>
				<property>aero/qbar-psf</property>
				<property>metrics/Sw-sqft</property>
				<toradians><property>/systems/fcs/stabilizer/final-deg</property></toradians>
				<value>-0.19827278</value>
			</product>
		</function>

		<function name="aero/coefficient/CLdsp_l">
			<description>Lift due to left spoiler</description>
			<product>
				<property>aero/qbar-psf</property>
				<property>metrics/Sw-sqft</property>
				<toradians><property>/systems/fcs/spoiler-left-deg</property></toradians>
				<value>-0.0261</value>
			</product>
		</function>

		<function name="aero/coefficient/CLdsp_r">
			<description>Lift due to right spoiler</description>
			<product>
				<property>aero/qbar-psf</property>
				<property>metrics/Sw-sqft</property>
				<toradians><property>/systems/fcs/spoiler-right-deg</property></toradians>
				<value>-0.0261</value>
			</product>
		</function>

	</axis>

	<axis name="DRAG">

		<function name="aero/coefficient/CD0">
			<description>Drag at zero lift</description>
			<product>
				<property>aero/qbar-psf</property>
				<property>metrics/Sw-sqft</property>
				<value>0.024</value>
			</product>
		</function>

		<function name="aero/coefficient/CDalpha">
			<description>Drag due to alpha</description>
			<product>
				<property>aero/qbar-psf</property>
				<property>metrics/Sw-sqft</property>
				<table>
					<independentVar lookup="row">aero/alpha-deg</independentVar>
					<tableData>
						-14.7960  0.0522
						-12.2922  0.0486
						 -9.4900  0.0360
						 -6.9768  0.0213
						 -3.2108  0.0047
						  0.0000  0.0000
						  3.2108  0.0047
						  6.9768  0.0213
						  9.4900  0.0360
						 12.2922  0.0486
						 14.7960  0.0522
					</tableData>
				</table>
			</product>
		</function>

		<function name="aero/coefficient/CDi">
			<description>Drag due to lift</description>
			<product>
				<property>aero/qbar-psf</property>
				<property>metrics/Sw-sqft</property>
				<property>aero/function/kCDge</property>
				<property>aero/cl-squared</property>
				<value>0.043</value>
			</product>
		</function>

		<function name="aero/coefficient/CDmach">
			<description>Drag due to mach</description>
			<product>
				<property>aero/qbar-psf</property>
				<property>metrics/Sw-sqft</property>
				<table>
					<independentVar lookup="row">velocities/mach</independentVar>
					<tableData>
						0.82  0.000
						1.10  0.016
						1.80  0.012
					</tableData>
				</table>
			</product>
		</function>

		<function name="aero/coefficient/CDbeta">
			<description>Drag due to sideslip</description>
			<product>
				<property>aero/qbar-psf</property>
				<property>metrics/Sw-sqft</property>
				<table>
					<independentVar lookup="row">aero/beta-rad</independentVar>
					<tableData>
						-1.57  1.23
						-0.26  0.05
						 0.00  0.00
						 0.26  0.05
						 1.57  1.23
					</tableData>
				</table>
			</product>
		</function>

		<function name="aero/coefficient/CDgear">
			<description>Drag due to gear</description>
			<product>
				<property>aero/qbar-psf</property>
				<property>metrics/Sw-sqft</property>
				<property>/systems/gear/all-norm</property>
				<value>0.0171</value>
			</product>
		</function>

		<function name="aero/coefficient/CDflap">
			<description>Drag due to flaps</description>
			<product>
				<property>aero/qbar-psf</property>
				<property>metrics/Sw-sqft</property>
				<property>fcs/flap-pos-deg</property>
				<value>0.00122</value>
			</product>
		</function>

		<function name="aero/coefficient/CDslat">
			<description>Drag due to slats</description>
			<product>
				<property>aero/qbar-psf</property>
				<property>metrics/Sw-sqft</property>
				<property>fcs/slat-pos-deg</property>
				<value>0.00118</value>
			</product>
		</function>

		<function name="aero/coefficient/CDde_l">
			<description>Drag due to left elevator</description>
			<product>
				<property>aero/qbar-psf</property>
				<property>metrics/Sw-sqft</property>
				<abs><toradians><property>/systems/fcs/elevator-l/final-deg</property></toradians></abs>
				<value>0.002625</value>
			</product>
		</function>

		<function name="aero/coefficient/CDde_r">
			<description>Drag due to right elevator</description>
			<product>
				<property>aero/qbar-psf</property>
				<property>metrics/Sw-sqft</property>
				<abs><toradians><property>/systems/fcs/elevator-r/final-deg</property></toradians></abs>
				<value>0.002625</value>
			</product>
		</function>

		<function name="aero/coefficient/CDdstab">
			<description>Drag due to stabilizer</description>
			<product>
				<property>aero/qbar-psf</property>
				<property>metrics/Sw-sqft</property>
				<abs><toradians><property>/systems/fcs/stabilizer/final-deg</property></toradians></abs>
				<value>0.00263</value>
			</product>
		</function>

		<function name="aero/coefficient/CDda_l">
			<description>Drag due to left aileron</description>
			<product>
				<property>aero/qbar-psf</property>
				<property>metrics/Sw-sqft</property>
				<abs><toradians><property>/systems/fcs/aileron-l/final-deg</property></toradians></abs>
				<value>0.0029271</value>
			</product>
		</function>

		<function name="aero/coefficient/CDda_r">
			<description>Drag due to right aileron</description>
			<product>
				<property>aero/qbar-psf</property>
				<property>metrics/Sw-sqft</property>
				<abs><toradians><property>/systems/fcs/aileron-r/final-deg</property></toradians></abs>
				<value>0.0029271</value>
			</product>
		</function>

		<function name="aero/coefficient/CDdsp_l">
			<description>Drag due to left spoiler</description>
			<product>
				<property>aero/qbar-psf</property>
				<property>metrics/Sw-sqft</property>
				<toradians><property>/systems/fcs/spoiler-left-deg</property></toradians>
				<value>0.0200716</value>
			</product>
		</function>

		<function name="aero/coefficient/CDdsp_r">
			<description>Drag due to right spoiler</description>
			<product>
				<property>aero/qbar-psf</property>
				<property>metrics/Sw-sqft</property>
				<toradians><property>/systems/fcs/spoiler-right-deg</property></toradians>
				<value>0.0200716</value>
			</product>
		</function>

	</axis>

	<axis name="SIDE">

		<function name="aero/coefficient/CYbeta">
			<description>Side force due to beta</description>
			<product>
				<property>aero/qbar-psf</property>
				<property>metrics/Sw-sqft</property>
				<property>aero/beta-rad</property>
				<value>-0.6093</value>
			</product>
		</function>

		<function name="aero/coefficient/CYp">
			<description>Side force due to roll rate</description>
			<product>
				<property>aero/qbar-psf</property>
				<property>metrics/Sw-sqft</property>
				<property>aero/bi2vel</property>
				<property>velocities/p-aero-rad_sec</property>
				<table>
					<independentVar lookup="row">aero/Re</independentVar>
					<tableData>
						29913298  0.4518
						32904628  0.0452
						44869948  0.0201
						59461352  0.0114
					</tableData>
				</table>
			</product>
		</function>

		<function name="aero/coefficient/CYr">
			<description>Side force due to yaw rate</description>
			<product>
				<property>aero/qbar-psf</property>
				<property>metrics/Sw-sqft</property>
				<property>aero/bi2vel</property>
				<property>velocities/r-aero-rad_sec</property>
				<value>0.6597</value>
			</product>
		</function>

		<function name="aero/coefficient/CYdr">
			<description>Side force due to rudder</description>
			<product>
				<property>aero/qbar-psf</property>
				<property>metrics/Sw-sqft</property>
				<toradians><property>aero/function/kCndr</property></toradians>
				<value>-0.13</value>
			</product>
		</function>

	</axis>

	<axis name="ROLL">

		<function name="aero/coefficient/Clbeta">
			<description>Roll moment due to beta</description>
			<product>
				<property>aero/qbar-psf</property>
				<property>metrics/Sw-sqft</property>
				<property>metrics/bw-ft</property>
				<property>aero/beta-deg</property>
				<table>
					<independentVar lookup="row">aero/alpha-deg</independentVar>
					<tableData>
						-4.4412 -0.00150
						-2.2116 -0.00167
						 0.1900 -0.00176
						 2.4828 -0.00189
						 4.9473 -0.00189
						 6.1394 -0.00194
					</tableData>
				</table>
			</product>
		</function>

		<function name="aero/coefficient/Clp">
			<description>Roll moment due to roll rate</description>
			<product>
				<property>aero/qbar-psf</property>
				<property>metrics/Sw-sqft</property>
				<property>metrics/bw-ft</property>
				<property>aero/bi2vel</property>
				<property>velocities/p-aero-rad_sec</property>
				<value>-0.51</value>
			</product>
		</function>

		<function name="aero/coefficient/Clr">
			<description>Roll moment due to yaw rate</description>
			<product>
				<property>aero/qbar-psf</property>
				<property>metrics/Sw-sqft</property>
				<property>metrics/bw-ft</property>
				<property>aero/bi2vel</property>
				<property>velocities/r-aero-rad_sec</property>
				<value>0.1</value>
			</product>
		</function>

		<function name="aero/coefficient/Clda_l">
			<description>Roll moment due to left aileron</description>
			<product>
				<property>aero/qbar-psf</property>
				<property>metrics/Sw-sqft</property>
				<property>metrics/bw-ft</property>
				<toradians><property>/systems/fcs/aileron-l/final-deg</property></toradians>
				<value>0.026</value>
			</product>
		</function>

		<function name="aero/coefficient/Clda_r">
			<description>Roll moment due to right aileron</description>
			<product>
				<property>aero/qbar-psf</property>
				<property>metrics/Sw-sqft</property>
				<property>metrics/bw-ft</property>
				<toradians><property>/systems/fcs/aileron-r/final-deg</property></toradians>
				<value>-0.026</value>
			</product>
		</function>

		<function name="aero/coefficient/Cldsp_l">
			<description>Roll moment due to left spoiler</description>
			<product>
				<property>aero/qbar-psf</property>
				<property>metrics/Sw-sqft</property>
				<property>metrics/bw-ft</property>
				<toradians><property>/systems/fcs/spoiler-left-deg</property></toradians>
				<value>-0.0165</value>
			</product>
		</function>

		<function name="aero/coefficient/Cldsp_r">
			<description>Roll moment due to right spoiler</description>
			<product>
				<property>aero/qbar-psf</property>
				<property>metrics/Sw-sqft</property>
				<property>metrics/bw-ft</property>
				<toradians><property>/systems/fcs/spoiler-right-deg</property></toradians>
				<value>0.0165</value>
			</product>
		</function>

		<function name="aero/coefficient/Cldr">
			<description>Roll moment due to rudder</description>
			<product>
				<property>aero/qbar-psf</property>
				<property>metrics/Sw-sqft</property>
				<property>metrics/bw-ft</property>
				<toradians><property>aero/function/kCndr</property></toradians>
				<value>0.008</value>
			</product>
		</function>

	</axis>

	<axis name="PITCH">

		<function name="aero/coefficient/Cmalpha">
			<description>Pitch moment due to alpha</description>
			<product>
				<property>aero/qbar-psf</property>
				<property>metrics/Sw-sqft</property>
				<property>metrics/cbarw-ft</property>
				<property>aero/function/kCmalpha</property>
				<table>
					<independentVar lookup="row">aero/alpha-deg</independentVar>
					<tableData>
						-9.4468  0.1195
						-6.3284  0.0827
						-5.4416  0.0694
						-4.3131  0.0548
						-3.0234  0.0377
						-2.0214  0.0226
						-0.6629  0.0083
						 0.4655 -0.0057
						 1.6628 -0.0177
						 2.9406 -0.0287
						 4.0685 -0.0356
						 5.2651 -0.0393
						 6.3583 -0.0440
						 7.3937 -0.0453
						 8.5212 -0.0464
						 9.8677 -0.0536
						11.3179 -0.0641
						20.1549 -0.1088
						45.4566  0.0097
					</tableData>
				</table>
			</product>
		</function>

		<function name="aero/coefficient/Cmq">
			<description>Pitch moment due to pitch rate</description>
			<product>
				<property>aero/qbar-psf</property>
				<property>metrics/Sw-sqft</property>
				<property>metrics/cbarw-ft</property>
				<property>aero/ci2vel</property>
				<property>velocities/q-aero-rad_sec</property>
				<value>-25.9</value>
			</product>
		</function>

		<function name="aero/coefficient/Cmadot">
			<description>Pitch moment due to alpha rate</description>
			<product>
				<property>aero/qbar-psf</property>
				<property>metrics/Sw-sqft</property>
				<property>metrics/cbarw-ft</property>
				<property>aero/ci2vel</property>
				<property>aero/alphadot-rad_sec</property>
				<value>-10.2489</value>
				<table> <!-- Fixes a JSBSim issue -->
					<independentVar lookup="row">velocities/vc-kts</independentVar>
					<tableData>
						0  0
						5  1
					</tableData>
				</table>
			</product>
		</function>

		<function name="aero/coefficient/Cmmach">
			<description>Pitch moment due to mach</description>
			<product>
				<property>aero/qbar-psf</property>
				<property>metrics/Sw-sqft</property>
				<property>metrics/cbarw-ft</property>
				<table>
					<independentVar lookup="row">velocities/mach</independentVar>
					<tableData>
						0.78  0.0000
						0.80  0.0025
						0.85 -0.0200
						0.88 -0.0225
					</tableData>
				</table>
			</product>
		</function>

		<function name="aero/coefficient/Cmde_l">
			<description>Pitch moment due to left elevator</description>
			<product>
				<property>aero/qbar-psf</property>
				<property>metrics/Sw-sqft</property>
				<property>metrics/cbarw-ft</property>
				<property>aero/function/kCmde</property>
				<toradians><property>/systems/fcs/elevator-l/final-deg</property></toradians>
				<value>-0.215796</value>
			</product>
		</function>

		<function name="aero/coefficient/Cmde_r">
			<description>Pitch moment due to right elevator</description>
			<product>
				<property>aero/qbar-psf</property>
				<property>metrics/Sw-sqft</property>
				<property>metrics/cbarw-ft</property>
				<property>aero/function/kCmde</property>
				<toradians><property>/systems/fcs/elevator-r/final-deg</property></toradians>
				<value>-0.215796</value>
			</product>
		</function>

		<function name="aero/coefficient/Cmdstab">
			<description>Pitch moment due to stabilizer</description>
			<product>
				<property>aero/qbar-psf</property>
				<property>metrics/Sw-sqft</property>
				<property>metrics/cbarw-ft</property>
				<property>aero/arm-factor</property> <!-- MD-87 -->
				<property>aero/function/kCmdstab</property>
				<toradians><property>/systems/fcs/stabilizer/final-deg</property></toradians>
				<value>-2.7206</value>
			</product>
		</function>

		<function name="aero/coefficient/Cmdsp">
			<description>Pitch moment due to symmetrical spoiler</description>
			<product>
				<property>aero/qbar-psf</property>
				<property>metrics/Sw-sqft</property>
				<property>metrics/cbarw-ft</property>
				<table>
					<independentVar lookup="row">aero/h_b-mac-ft</independentVar>
					<tableData>
						0  0.5
						1  1.0
					</tableData>
				</table>
				<toradians><property>/systems/fcs/spoiler-symmetrical-deg</property></toradians>
				<value>0.011</value>
			</product>
		</function>

	</axis>

	<axis name="YAW">

		<function name="aero/coefficient/Cnbeta">
			<description>Yaw moment due to beta</description>
			<product>
				<property>aero/qbar-psf</property>
				<property>metrics/Sw-sqft</property>
				<property>metrics/bw-ft</property>
				<property>aero/beta-deg</property>
				<table>
					<independentVar lookup="row">aero/alpha-deg</independentVar>
					<tableData>
						-4.7093  0.00198
						-2.2164  0.00211
						 0.2903  0.00194
						 2.9836  0.00180
						 5.5629  0.00207
					</tableData>
				</table>
			</product>
		</function>

		<function name="aero/coefficient/Cnr">
			<description>Yaw moment due to yaw rate</description>
			<product>
				<property>aero/qbar-psf</property>
				<property>metrics/Sw-sqft</property>
				<property>metrics/bw-ft</property>
				<property>aero/bi2vel</property>
				<property>velocities/r-aero-rad_sec</property>
				<value>-0.25</value>
			</product>
		</function>

		<function name="aero/coefficient/Cndr">
			<description>Yaw moment due to rudder</description>
			<product>
				<property>aero/qbar-psf</property>
				<property>metrics/Sw-sqft</property>
				<property>metrics/bw-ft</property>
				<toradians><property>aero/function/kCndr</property></toradians>
				<value>0.04313</value>
			</product>
		</function>

	</axis>

</aerodynamics>
