<?xml version="1.0"?>

<!-- Copyright (c) 2026 Josh Davidson (Octal450) -->

<fdm_config name="MD-87" version="2.0" release="BETA">

	<fileheader>
		<author>Josh Davidson (Octal450)</author>
		<description>MD-87 FDE with JT8D-217C Engines</description> <!-- Note: -217C is a -219 operated as a -217A, so just use -217A files -->
	</fileheader>

	<aerodynamics file="FDE/Config/md-80-aerodynamics.xml"/>
	<external_reactions file="FDE/Config/md-87-external-reactions"/>
	<ground_reactions file="FDE/Config/md-87-ground-reactions"/>
	<mass_balance file="FDE/Config/md-87-mass-balance"/>
	<metrics file="FDE/Config/md-80-metrics"/>

	<system file="md-80-core"/>
	<system file="md-80-electrical"/>
	<system file="md-80-fire"/>
	<system file="md-80-fuel"/>
	<system file="md-80-hydraulics"/>
	<system file="md-80-irs-ahrs"/>
	<system file="md-80-pneumatics"/>
	<system file="md-80-hvac"/>
	<system file="md-80-pressurization"/>
	<system file="md-80-dfgs"/>
	<system file="md-80-fcs"/>
	<system file="md-80-spoilers"/>
	<system file="md-80-ignition"/>
	<system file="md-80-217a-engine-thrlim"/>
	<system file="md-80-apu"/>
	<system file="md-80-misc"/>
	<system file="md-80-performance"/>
	<system file="md-80-cockpit"/>
	<system file="md-87-cockpit-firetank"/>
	<system file="md-80-instrumentation"/>

	<propulsion>
		<engine file="jt8d-217a_1">
			<feed>5</feed>
			<thruster file="direct">
				<location unit="M"> <!-- Fudged for accuracy -->
					<x>31.2498</x>
					<y>-1.4</y>
					<z>-0.15426</z>
				</location>
				<orient unit="DEG">
					<roll>0</roll>
					<pitch>0</pitch>
					<yaw>0</yaw>
				</orient>
			</thruster>
		</engine>

		<engine file="jt8d-217a_2">
			<feed>6</feed>
			<thruster file="direct">
				<location unit="M"> <!-- Fudged for accuracy -->
					<x>31.2498</x>
					<y>1.4</y>
					<z>-0.15426</z>
				</location>
				<orient unit="DEG">
					<roll>0</roll>
					<pitch>0</pitch>
					<yaw>0</yaw>
				</orient>
			</thruster>
		</engine>

		<engine file="gtcp85-98dhf">
			<feed>7</feed>
			<thruster file="direct">
				<location unit="M">
					<x>32.9714</x>
					<y>1.2879</y>
					<z>1.15571</z>
				</location>
				<orient unit="DEG">
					<roll>0</roll>
					<pitch>0</pitch>
					<yaw>0</yaw>
				</orient>
			</thruster>
		</engine>

		<!-- Fuel Tank Capacities from Type Sheet, positions fudged for CG accuracy -->
		<tank type="FUEL"> <!-- Left Tank -->
			<location unit="M">
				<x>23.91839</x>
				<y>-5.03595</y>
				<z>-0.2272</z>
			</location>
			<capacity unit="LBS">9819</capacity>
			<contents unit="LBS">6000</contents>
			<standpipe unit="LBS">31</standpipe>
			<priority>1</priority>
			<type>JET-A1</type>
			<temperature>50</temperature>
		</tank>
		<tank type="FUEL"> <!-- Center Tank -->
			<location unit="M">
				<x>23.23756</x>
				<y>0</y>
				<z>-0.30645</z>
			</location>
			<capacity unit="LBS">21801</capacity>
			<contents unit="LBS">0</contents>
			<standpipe unit="LBS">43</standpipe>
			<priority>1</priority>
			<type>JET-A1</type>
			<temperature>50</temperature>
		</tank>
		<tank type="FUEL"> <!-- Right Tank -->
			<location unit="M">
				<x>23.91839</x>
				<y>5.03595</y>
				<z>-0.2272</z>
			</location>
			<capacity unit="LBS">9819</capacity>
			<contents unit="LBS">6000</contents>
			<standpipe unit="LBS">31</standpipe>
			<priority>1</priority>
			<type>JET-A1</type>
			<temperature>50</temperature>
		</tank>
		<tank type="FUEL"> <!-- Placeholder -->
			<location unit="M">
				<x>22.71293</x>
				<y>0</y>
				<z>-0.30645</z>
			</location>
			<capacity unit="LBS">0.001</capacity>
			<contents unit="LBS">0</contents>
			<standpipe unit="LBS">43</standpipe>
			<priority>1</priority>
			<type>JET-A1</type>
			<temperature>50</temperature>
		</tank>
		<tank type="FUEL"> <!-- Placeholder -->
			<location unit="M">
				<x>24.86357</x>
				<y>0</y>
				<z>-0.30645</z>
			</location>
			<capacity unit="LBS">0.001</capacity>
			<contents unit="LBS">0</contents>
			<standpipe unit="LBS">43</standpipe>
			<priority>1</priority>
			<type>JET-A1</type>
			<temperature>50</temperature>
		</tank>
		<tank type="FUEL"> <!-- Engine 1 Pipe -->
			<location unit="M">
				<x>24.20826</x>
				<y>0</y>
				<z>-0.19827</z>
			</location>
			<capacity unit="LBS">10</capacity>
			<contents unit="LBS">0</contents>
			<priority>1</priority>
			<type>JET-A1</type>
		</tank>
		<tank type="FUEL"> <!-- Engine 2 Pipe -->
			<location unit="M">
				<x>24.20826</x>
				<y>0</y>
				<z>-0.19827</z>
			</location>
			<capacity unit="LBS">10</capacity>
			<contents unit="LBS">0</contents>
			<priority>1</priority>
			<type>JET-A1</type>
		</tank>
		<tank type="FUEL"> <!-- APU Pipe -->
			<location unit="M">
				<x>24.20826</x>
				<y>0</y>
				<z>-0.19827</z>
			</location>
			<capacity unit="LBS">5</capacity>
			<contents unit="LBS">0</contents>
			<priority>1</priority>
			<type>JET-A1</type>
		</tank>
	</propulsion>

</fdm_config>
